**
**
**
** file created by  A N S A  Wed May 13 21:31:50 2015
**
** output from :
**
** /home/hpcralf/programme/covise/src/module/hlrs/ReadABAQUSfil/testdata/Beam.inp
**
**
*HEADING

**
**
**
**
**
**
*NODE
       1,                       5.,                       5.,                     200.
       2,        4.999999999999997,                       0.,                     200.
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**
** SOLID ELEMENTS
**
*ELEMENT, TYPE=C3D8, ELSET=P3;Beam_Solid
     169,       53,        7,        6,        8,       11,       95,      171,      152
     170,        7,       64,       10,        6,       95,       33,      114,      171
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**
**
**
**
**
**
**
** SECTION DATA
**
*SOLID SECTION, ELSET=P3;Beam_Solid, MATERIAL=M3;Default MATERIAL
**
** MATERIALS
**
**
**M3;Default MATERIAL
**
*MATERIAL, NAME=M3;Default MATERIAL
*DENSITY
                 7.85E-9,
*ELASTIC, TYPE=ISOTROPIC
                  21000.,                      0.3
**
**
**
**
** SETS
**
*ELSET, ELSET=Part1
     169, 170, 171, 172, 173, 174, 175, 176, 177, 178, 179, 180
**
*NSET, NSET=Set_Load
       1,        2,        3,        4,        5,       17,       26,       29,       36
**
** STEPS
**
**
** STEP 1
**
*STEP, NAME=STEP 1, NLGEOM=YES
*STATIC
                     0.1,                       1.
**
** CLOAD
**
*CLOAD
Set_Load,        2,                     -10.
**
** BOUNDARY
**
*BOUNDARY, TYPE=DISPLACEMENT
       6,        1,        3,                       0.
       7,        1,        3,                       0.
       8,        1,        3,                       0.
       9,        1,        3,                       0.
      10,        1,        3,                       0.
      53,        1,        3,                       0.
      63,        1,        3,                       0.
      64,        1,        3,                       0.
      72,        1,        3,                       0.
*NODE FILE, FREQUENCY=1, GLOBAL=YES
RF,
U,
*EL FILE, FREQUENCY=1, POSITION=CENTROIDAL
E,
S,
*END STEP
**
** STEP 1
**
*STEP, NAME=STEP 2, NLGEOM=YES
*STATIC
                     0.1,                       1.
**
** CLOAD
**
*CLOAD
Set_Load,        1,                     -10.
**
** BOUNDARY
**
*BOUNDARY, TYPE=DISPLACEMENT
       6,        1,        3,                       0.
       7,        1,        3,                       0.
       8,        1,        3,                       0.
       9,        1,        3,                       0.
      10,        1,        3,                       0.
      53,        1,        3,                       0.
      63,        1,        3,                       0.
      64,        1,        3,                       0.
      72,        1,        3,                       0.
*NODE FILE, FREQUENCY=1, GLOBAL=YES
RF,
U,
*EL FILE, FREQUENCY=1, POSITION=CENTROIDAL
E,
S,
*END STEP
